datos := READTEXT("presion_arterial_no_invasiva.txt")
N := rows(datos)
m := 0 .. N - 1
# [plot: datos[m] vs m]
# Aplicando la FTD a la señal, se tiene:
j := sqrt(-1)
FTD_datos(θ) := sum(datos[m]*e^(-j*m*θ), m = 0 .. N - 1)
# [plot: 20*log(|FTD_datos(θ)|) vs θ]
# ¿Qué filtro se puede aplicar para que la señal resultante tenga la misma fase aplicada?
#
# Imagino a que el filtro debe mantener la fase de la señal de entrada.
