h(n, θc) := ((-1)^n - cos(n*θc))/(n*π)
θc := π/10
n := -40 .. 40
L := 41  # Se define un truncamiento a 41 términos en la señal de entrada
# [plot: h(n, θc) vs n]
# Para el filtro pasabajos para el termino cero, la respuesta es cero debido a que se tiene una sumatoria de señales opuestas en magnitud, esto para la respuesta del filtro en el tiempo para señal anti-simétrica.
trunc := L - 1
htrunc(trunc, θc) := □  # error: Falta un término o una expresión.
htrunc_causal(n, θc) := htrun(n - trunc, θc)  # error: Esta variable no está definida. Compruebe que el rótulo esté definido correctamente.
datos := READTEXT("presion_arterial_no_invasiva.txt")
N := rows(datos)
m := 0 .. N - 1
# [plot: datos[m] vs m]
# Aplicando la FTD a la señal, se tiene:
j := sqrt(-1)
FTD_datos(θ) := sum(datos[m]*e^(-j*m*θ), m = 0 .. N - 1)
# [plot: 20*log(|FTD_datos(θ)|) vs θ]
# ¿Qué filtro se puede aplicar para que la señal resultante tenga la misma fase aplicada?
#
# Imagino a que el filtro debe mantener la fase de la señal de entrada.
