j := sqrt(-1)
θ := 0, π/1000 .. π/2
H(θ) := 1*(π/10)^2*(1 + e^(-j*θ))^2/(1*(π/10)^2*(1 + e^(-j*θ))^2 + sqrt(2)*(π/10)*2*(1 + e^(-j*θ))*(1 - e^(-j*θ)) + 4*(1 - e^(-j*θ))^2)
# [plot: |H(θ)| vs θ (2)]
# [plot: 20*log(|H(θ)|) vs θ]
|H(π/10)| = 0.701233
