ε := 0.01
δaprox2(t) := sin((t + 1)/ε)/(π*(t + 1))
t := -2, -1.999 .. 2
# [plot: δaprox2(t) vs t]
integral(δaprox2(t), t = -1.01 .. -0.99) = 0.602295
# La función delta de dirac evalua la función en el punto en el cual la función esta definida u ocurre la función (delta de dirac).
#
# Por lo tanto será 0  si los limites de la integral no incluyen el punto de definición para la función
f(t) := 3*cos(2*t)
integral(f(t)*δaprox2(t), t = -1.1 .. 0.9) = -1.29712
