# Worksheet setting: ORIGIN = 1
t := 0, 0.001 .. 1
x0(t) := if(0.05 ≤ t < 0.15, 0.3*cos(10*π*(t - 0.1)), 0)
x1(t) := if(0.25 ≤ t < 0.3, -6*t + 1.5, 0)
x2(t) := if(0.3 ≤ t < 0.4, 13*t - 4.2, 0)
x3(t) := if(0.4 ≤ t < 0.5, -13*t + 6.2, 0)
x4(t) := if(0.5 ≤ t < 0.55, 6*t - 3.3, 0)
x5(t) := if(0.7 ≤ t ≤ 0.9, 0.4*cos(5*π*(t - 0.8)), 0)
# Función a trozos completa
# [plot: x0(t), x1(t), x2(t), x3(t), x4(t), x5(t) vs t]
ecg(t) := x0(t) + x1(t) + x2(t) + x3(t) + x4(t) + x5(t)
# [plot: ecg(t) vs t]
T := 1
fz := 1/T
a0 := 1/T*integral(ecg(t), t = 0 .. T) = 0.12515
k := 1, 2 .. 20
acoef[k] := 2/T*integral(ecg(t)*cos(k*2*π*fz*t), t = 0 .. T)  # error: El cálculo no se está convergiendo en una solución. Consulte la ayuda para obtener información adicional.
bcoef[k] := 2/T*integral(ecg(t)*sin(k*2*π*fz*t), t = 0 .. T)  # error: El cálculo no se está convergiendo en una solución. Consulte la ayuda para obtener información adicional.
acoef[k] =  # error: Esta variable no está definida. Compruebe que el rótulo esté definido correctamente.
bcoef[k] =  # error
ecg_sint(t) := a0 + sum(acoef[k]*cos(k*2*π*fz*t), k = 1 .. 5) + sum(bcoef[k]*sin(k*2*π*fz*t), k = 1 .. 5)
# [plot: ecg_sint(t) vs t]
# [plot: ecg(t) vs t]
|acoef[k]| =  # error
|bcoef[k]| =  # error
π*sqrt(acoef[k]^2 + bcoef[k]^2) =  # error
# Discretizando una señal mediante un tren de impulsos
