# Worksheet setting: ORIGIN = 1
n := 1, 2 .. 30
a_0 := 0.125
T := 1
fz := 1/T
coef[n] := integral((0.3*cos(10*π*(x - 0.1)))*sin(n*2*π*fz*x), x = -15 .. 15)
ft_serie(x) := a_0 + sum(coef[n]*cos(n*2*π*fz*x), n = 1 .. 30)
# [plot: ft_serie(x) vs x]
