M_k := 1, 2 .. 10
j := 1, 2 .. 20
M[j] := 1, 2 .. 20
M_1 =  # error: Esta variable no está definida. Compruebe que el rótulo esté definido correctamente.
B := [1, 2, 3, 4, 15, 16, 17]
C := [0; 2; 15; 20]
IsArray(C) = 1
f(x) := M_k*x^2
acoef_v := integral(f(x), x = 0 .. 2)  # error: El cálculo no se está convergiendo en una solución. Consulte la ayuda para obtener información adicional.
