Ω := π/50
x(n) := sin(Ω*n)
# El procesamiento digital de señales también consta en el análisis para definir la cantidad de muestras necesarias para obtener una respuesta confiable y que además esta estará dependerá de la función a analizar
P(N) := 1/(2*N + 1)*sum(x(n)^2, n = -N .. N)
P2(N) := 1/N*sum(x(n)^2, n = 0 .. N - 1)
N := 1 .. 40
N := 1 .. 30
N := 1 .. 200
N := 1 .. 300
# [plot: P(N), P2(N) vs N]
