a := 0.999777
j := sqrt(-1)
X1(θ) := 1/(1 - a*e^(-j*θ))
X2(θ) := 1/(1 + a^2 - 2*a*cos(θ))
integral(X2(θ), θ) → -2242.40249424*atan((4483.80498849*cos(θ) - 4483.80487698)/sin(θ))
integral(X2(θ), a) → -0.5/(cos(θ) - 1.00000002487)
3160^2/(15*π)*integral(X2(θ), θ = 9*π/25 .. 12*π/25) = 54137.5
11*10^-3/(900*10^-6) = 12.2222
3160^2/π*0.2*10^-6/15*integral(X2(θ), θ = 9*π/25 .. 12*π/25) = 0.0108275
