n := 1, 2 .. 20
x7(n) := if(n ≥ 0, (3/4)^n*sin(π/4*n), 0)
# A. Graficar la señal x7[n] hasta n = 20
# [plot: x7(n) vs n]
# b) Hallar y graficar la FTD de la señal, truncando hasta 20
j := sqrt(-1)
X7(θ) := sum(x7(n)*e^(-j*n*θ), n = -∞ .. ∞)
N := 8
Potencia := 1/(2*N + 1)*sum(x7(n)^2, n = -N .. N)
Potencia = 0.0444346
