# Lectura de datos con MATHCAD
D := READTEXT("datos.txt")
RT := READTEXT("datos1.txt")
# Evaluar si la señal en el archivo DATOS es de energía o si es de potencia
cols(D) = 1
rows(D) = 50250
cols(RT) = 1
rows(RT) = 10
n := 0 .. rows(D) - 1
RT[0, 0] = 1
# [plot: D[n, 0] vs n]
P(N) := 1/(N + 1)*sum(D[n, 0], n = 0 .. N)  # Calculo de la potencia con los datos cargados desde el archivo .txt
N := 1 .. 1000
n := 0 .. 10000
# [plot: P(N) (W) vs N]
