M := 20
θc := π/3
W(λ) := sin((2*M + 1)/2*λ)/sin(λ/2)
FPBAJO_IDEAL(θ) := if(θ < -θc or θ > θc, 0, 1)
FTRUNC(θ) := 1/(2*π)*integral(W(λ), λ = θ - θc .. θ + θc)
# [plot: |FTRUNC(θ)|, FPBAJO_IDEAL(θ), |W(θ)|/(2*M + 1) vs θ]
FTRUNC_menor(θ) := 1/(2*π)*integral(W(λ), λ = -π .. θ + θc)
FTRUNC_mayor(θ) := 1/(2*π)*integral(W(λ), λ = θ - θc .. π)
# Prueba mediante el empleo de una señal triangular, para ver si será necesario hacer uso de señales diferentes a una rectangular y para determinar esto se puede hacer uso del análisis de la forma de onda de respuesta y el valor de θ cuando se tiene una ganancia de -3db
wtriang(n) := if(n < 0 and n ≥ -M, (n + M)/M, if(n ≥ 0 and n ≤ M, (M - n)/M, 0))
n := -40 .. 40
j := sqrt(-1)
# [plot: wtriang(n) vs n]
# El efecto de multiplicar la respuesta al impulso del filtro pasabajos por la ventana triangular tendrá un efecto en el dominio de la frecuencia que se puede estudiar mediante la convolución
ESPECTRO_Wtriang(θ) := 2
θ := -π + θc, -π + θc + π/1000 .. π - θc
FVENT_TRIANG(θ) := 1/(2*π)*integral(ESPECTRO_Wtriang(λ), λ = θ - θc .. θ + θc)
