tiempoSimulacion := 10
T := 0.01
y[0] := 0
n := 0 .. tiempoSimulacion/T
tiempoSimulacion/T = 1000
x[n] := if(n ≥ 0.1, 1, 0)
y[n] := 0.9352*x[n] - 0.9229*if(n ≥ 1, x[n - 1], 0) - 0.9337*if(n ≥ 2, x[n - 2], 0) + 0.9244*if(n ≥ 3, x[n - 3], 0) + 1.0462*if(n ≥ 1, y[n - 1], 0) + 0.8751*if(n ≥ 2, y[n - 2], 0) - 0.9244*if(n ≥ 3, y[n - 3], 0)
# [plot: y[n] vs n*T]
