tiempoSimulacion := 30
T := 0.1
# Lo que puede afectar a los sistema discretos en gran medida es el tiempo de muestreo para el sistema (para un T grande se tendrían) saltos grandes entre valores, por lo tanto se busca un T pequeño.
y[0] := 0
m := 0 .. tiempoSimulacion/T
a := (1 - T/2)/(1 + T/2)
b := T/2/(1 + T/2)
# En un sistema discreto la estabilidad se encuentra en dependencia de la variable (Para el caso propuesto) y su modulo debe ser menor a 1 como condición de estabilidad.
#
# Cuando a es 1, el sistema es marginalmente estable.
#
# Cuando es menor a cero, el sistema tiene un comportamiento errático u oscilatorio.
#
# Esto debido a la siguiente expresión
x[m] := if(m ≥ 0, 1*sin(2*π/3*m*T), 0)
x[m] := if(m ≥ 0, 1*1, 0)
tiempoSimulacion/T = 300
a = 0.904762
b = 0.047619
n := 0 .. tiempoSimulacion/T
y[n] := b*x[n] + b*if(n ≥ 1, x[n - 1], 0) + a*if(n ≥ 1, y[n - 1], 0)
# [plot: y[n] vs n*T]
# El valor de y0 depende del tiempo de muestreo y se comprueba con la solución analítica.
# Para hallar un sistema genérico, se tendría que hallar la ecuación de diferencias en función de a y b
# Esta ecuación de diferencias es para un T = 0.1
y[n] := 0.1429*x[n] + 0.0204*if(n ≥ 1, x[n - 1], 0) - 0.1224*if(n ≥ 2, x[n - 2], 0) + 1.6124*if(n ≥ 1, y[n - 1], 0) - 0.6532*if(n ≥ 2, y[n - 2], 0)
y[n] := 0.1431*x[n] + 0.02039*if(n ≥ 1, x[n - 1], 0) - 0.1224*if(n ≥ 2, x[n - 2], 0) + 1.6118*if(n ≥ 1, y[n - 1], 0) - 0.6530*if(n ≥ 2, y[n - 2], 0)
# [plot: y[n], x[n] vs n*T]
