tiempoSimulacion := 30
T := 5
y[0] := 0
m := 0 .. tiempoSimulacion/T
a := (1 - T/2)/(1 + T/2)
b := T/2/(1 + T/2)
x[m] := if(m ≥ 0, 1*sin(2*π/3*m*T), 0)
x[m] := if(m ≥ 0, 1*1, 0)
tiempoSimulacion/T = 6
a = -0.428571
b = 0.714286
n := 0 .. tiempoSimulacion/T
y[n] := b*x[n] + b*if(n ≥ 1, x[n - 1], 0) + a*if(n ≥ 1, y[n - 1], 0)
# [plot: y[n] vs n*T]
