e
e := 2*π/12 = 0.523599
y[0] := 0
x[0] := 1
y[1] := 0
x[1] := 0
sin(e) = 0.5
x[2] := 0
cos(e) = 0.866025
a := 0.9
ganancia1 := a*sin(e)
ganancia2 := a*2*cos(e)
n := 2, 3 .. 36
x[n] := x[n - 1]
y[n] := ganancia2*y[n - 1] - a^2*y[n - 2] + ganancia1*if(n == 2, 1, 0)
# [plot: y[n] vs n]
# [plot: x[n] vs n]
