# Worksheet setting: ORIGIN = 1
# Función definida a Trozos
x0(x) := if(0.05 ≤ x < 0.15, 0.3*cos(10*π*(x - 0.1)), 0)
x1(x) := if(0.25 ≤ x < 0.3, -6*x + 1.5, 0)
x2(x) := if(0.3 ≤ x < 0.4, 13*x - 4.2, 0)
x3(x) := if(0.4 ≤ x < 0.5, -13*x + 6.2, 0)
x4(x) := if(0.5 ≤ x < 0.55, 6*x - 3.3, 0)
x5(x) := if(0.7 ≤ x ≤ 0.9, 0.4*cos(5*π*(x - 0.8)), 0)
f(x) := x0(x) + x1(x) + x2(x) + x3(x) + x4(x) + x5(x)
T := 20
fz := 1/T
a_0 := 1/T*integral(f(x), x = 0 .. T)
a_0 = 0.00625153
n := 1, 2 .. 20
acoef[n] := 2/T*integral(f(x)*cos(n*2*π*fz*x), x = 0 .. T)
bcoef[n] := 2/T*integral(f(x)*sin(n*2*π*fz*x), x = 0 .. T)
max := 20
ft_serie(x) := a_0 + sum(acoef[n]*cos(n*2*π*fz*x), n = 1 .. max) + sum(bcoef[n]*sin(n*2*π*fz*x), n = 1 .. max)
# [plot: ft_serie(x) vs x]
# [plot: f(x) vs x]
